*Heading
** Job name: Job-1 Model name: Model-1
** Generated by: Abaqus/CAE 6.12-1
*Preprint, echo=NO, model=NO, history=NO, contact=NO
**
** PARTS
**
*Part, name=Part-1
*End Part
**
**
** ASSEMBLY
**
*Assembly, name=Assembly
**
*Instance, name=Part-1-1, part=Part-1
*Node
      1,           0.,          50.
      2,          50.,           0.
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*Element, type=CPS4R
  1,   8, 112, 155,   7
  2, 115,  11,  12, 100
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*Nset, nset=Set-1, generate
   1,  572,    1
*Elset, elset=Set-1, generate
   1,  531,    1
** Section: Section-1
*Solid Section, elset=Set-1, material=Material-1
1.,
*End Instance
**
*left
  1,  6, 73, 74, 75, 76, 77, 78, 79, 80, 81, 82, 83, 84, 85
 86, 87, 88, 89, 90
*Elset, elset=Set-1, instance=Part-1-1
  44,  45,  60,  63,  64,  65
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*bottom
  2, 6, 26, 27, 28, 29, 30, 31, 32, 33, 34, 91, 92, 93, 94
 95, 96, 97, 98, 99
*Elset, elset=Set-2, instance=Part-1-1
  10,  20,  23,  26,  27,  71
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*curve
  3,  4,  5, 35, 36, 37, 38, 39, 40, 41, 42, 43, 44, 45, 46, 47
 48, 49, 50, 51, 52, 53, 5, 54, 55, 56, 57, 58, 59, 60, 61, 62, 63
 64, 65, 66, 67, 68, 69, 70, 71, 72
*Elset, elset=Set-3, instance=Part-1-1
   4,   6,  16,  20,  21,  28
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*corner
  6
*End Assembly
**
** MATERIALS
**
*Material, name=Material-1
*Density
1.,
*Elastic
1., 0.1
** ----------------------------------------------------------------
**
** STEP: Step-1
**
*Step, name=Step-1
*Static
1., 1., 1e-05, 1.
**
** BOUNDARY CONDITIONS
**
** Name: BC-1 Type: Symmetry/Antisymmetry/Encastre
*Boundary
Set-1, XSYMM
** Name: BC-2 Type: Symmetry/Antisymmetry/Encastre
*Boundary
Set-2, XSYMM
** Name: BC-3 Type: Symmetry/Antisymmetry/Encastre
*Boundary
Set-3, ZSYMM
**
** OUTPUT REQUESTS
**
*Restart, write, frequency=0
**
** FIELD OUTPUT: F-Output-1
**
*Output, field, variable=PRESELECT
**
** HISTORY OUTPUT: H-Output-1
**
*Output, history, variable=PRESELECT
*End Step
